<?xml version="1.0"?>
<?xml-stylesheet type="text/xsl" href="http://jsbsim.sourceforge.net/JSBSim.xsl"?>
<fdm_config name="B-1B" version="2.0" release="ALPHA"
   xmlns:xsi="http://www.w3.org/2001/XMLSchema-instance"
   xsi:noNamespaceSchemaLocation="http://jsbsim.sourceforge.net/JSBSim.xsd">

 <fileheader>
  <author> Aeromatic v 0.96 </author>
  <filecreationdate>2023-11-18</filecreationdate>
  <version>$Revision: 1.20 $</version>
  <description> Models a B-1B. </description>
 </fileheader>

<!--
  File:     B-1B.xml
  Inputs:
    name:          B-1B
    type:          two-engine transonic/supersonic fighter
    max weight:    477000 lb
    wing span:     137 ft
    length:        146 ft
    wing area:     1946 sq-ft
    gear type:     tricycle
    castering:
    retractable?:  yes
    # engines:     4
    engine type:   turbine
    engine layout: middle fuselage
    yaw damper?    yes
  Outputs:
    wing loading:  245.12 lb/sq-ft
    payload:       191454.0 lbs
    CL-alpha:      3.6 per radian
    CL-0:          0.08
    CL-max:        1
    CD-0:          0.024
    K:             0.12

-->

 <metrics>
   <wingarea  unit="FT2"> 1946.00 </wingarea>
   <wingspan  unit="FT" >  137.00 </wingspan>
   <wing_incidence>          2.00 </wing_incidence> <!-- 0 -->
   <chord     unit="FT" >   14.20 </chord> <!-- 15.33 -->
   <htailarea unit="FT2">  509.00 </htailarea>
   <htailarm  unit="FT" >   65.25 </htailarm>
   <vtailarea unit="FT2">  247.40 </vtailarea>
   <vtailarm  unit="FT" >   65.25 </vtailarm>
   <location name="AERORP" unit="IN">
     <x> 969.00 </x>
     <y>   0.00 </y>
     <z>   0.00 </z>
   </location>
   <location name="EYEPOINT" unit="IN">
     <x> 350.40 </x>
     <y>   0.00 </y>
     <z>  38.00 </z>
   </location>
   <location name="VRP" unit="IN">
     <x>0</x>
     <y>0</y>
     <z>0</z>
   </location>
 </metrics>

 <mass_balance>
<!--        <ixx unit="SLUG*FT2">   1859593 </ixx>-->
<!--   <iyy unit="SLUG*FT2">   0 </iyy>-->
<!--   <izz unit="SLUG*FT2">   10855 </izz>-->
   <ixx unit="SLUG*FT2">   2289362 </ixx>
   <iyy unit="SLUG*FT2">   3573887 </iyy>
   <izz unit="SLUG*FT2">   4881552 </izz>
   <emptywt unit="LBS" >    186807 </emptywt>
   <location name="CG" unit="IN">
     <x> 969.00 </x>
     <y>   0.00 </y>
     <z> -43.80 </z>
   </location>
 </mass_balance>
    <system file="eng_ind.xml"/>
    <system file="b1b-engines.xml"/>
    <system file="b1b-pneumatic.xml"/>
    <system file="b1b-electrical.xml"/>
    <system file="b1b-control.xml"/>
 <ground_reactions>

  <contact type="BOGEY" name="NOSE">
   <location unit="IN">
     <x> 360.25 </x>
     <y>   0.00 </y>
     <z> -121.5 </z>
   </location>
   <static_friction>  0.80 </static_friction>
   <dynamic_friction> 0.50 </dynamic_friction>
   <rolling_friction> 0.02 </rolling_friction>
   <spring_coeff unit="LBS/FT">      143100.00 </spring_coeff>
   <damping_coeff unit="LBS/FT/SEC"> 71550.00 </damping_coeff>
   <max_steer unit="DEG"> 5.00 </max_steer>
   <brake_group>NONE</brake_group>
   <retractable>1</retractable>
  </contact>

  <contact type="BOGEY" name="LEFT_MAIN">
   <location unit="IN">
     <x> 1038.0 </x>
     <y> -87.0 </y>
     <z> -122.45 </z>
   </location>
   <static_friction>  0.80 </static_friction>
   <dynamic_friction> 0.50 </dynamic_friction>
   <rolling_friction> 0.02 </rolling_friction>
   <spring_coeff unit="LBS/FT">      477000.00 </spring_coeff>
   <damping_coeff unit="LBS/FT/SEC"> 238500.00 </damping_coeff>
   <max_steer unit="DEG">0</max_steer>
   <brake_group>LEFT</brake_group>
   <retractable>1</retractable>
  </contact>

  <contact type="BOGEY" name="RIGHT_MAIN">
   <location unit="IN">
     <x> 1038.0 </x>
     <y> 87.0 </y>
     <z> -122.45 </z>
   </location>
   <static_friction>  0.80 </static_friction>
   <dynamic_friction> 0.50 </dynamic_friction>
   <rolling_friction> 0.02 </rolling_friction>
   <spring_coeff unit="LBS/FT">      477000.00 </spring_coeff>
   <damping_coeff unit="LBS/FT/SEC"> 238500.00 </damping_coeff>
   <max_steer unit="DEG">0</max_steer>
   <brake_group>RIGHT</brake_group>
   <retractable>1</retractable>
  </contact>

    <contact type="STRUCTURE" name="RADOME">
        <location unit="IN"> <!-- B-1B Fact Book -->
            <x> 39.46 </x>
            <y>  0.0  </y>
            <z>  0.0  </z>
        </location>
        <static_friction>  1.00 </static_friction>
        <dynamic_friction> 1.00 </dynamic_friction>
        <spring_coeff unit="LBS/FT">      477000.00 </spring_coeff>
        <damping_coeff unit="LBS/FT/SEC"> 477000.00 </damping_coeff>
    </contact>


  <contact type="STRUCTURE" name="LEFT_WING">
    <location unit="IN">
     <x> 969.00 </x>
     <y> -68.50 </y>
     <z> -43.80 </z>
    </location>
    <static_friction>  1.00 </static_friction>
    <dynamic_friction> 1.00 </dynamic_friction>
    <spring_coeff unit="LBS/FT">      477000.00 </spring_coeff>
    <damping_coeff unit="LBS/FT/SEC"> 477000.00 </damping_coeff>
  </contact>

  <contact type="STRUCTURE" name="RIGHT_WING">
    <location unit="IN">
     <x> 969.00 </x>
     <y>  68.50 </y>
     <z> -43.80 </z>
    </location>
    <static_friction>  1.00 </static_friction>
    <dynamic_friction> 1.00 </dynamic_friction>
    <spring_coeff unit="LBS/FT">      477000.00 </spring_coeff>
    <damping_coeff unit="LBS/FT/SEC"> 477000.00 </damping_coeff>
  </contact>

 </ground_reactions>

 <propulsion>

   <engine file="F101-GE-102">
    <feed>0</feed>
    <feed>1</feed>
    <feed>2</feed>
    <feed>3</feed>
    <feed>4</feed>
    <feed>5</feed>
    <feed>6</feed>
    <feed>7</feed>
    <feed>8</feed>
    <feed>9</feed>
    <feed>10</feed>
    <location unit="IN">
      <x> 969.00 </x>
      <y> -60.00 </y>
      <z> -12.00 </z>
    </location>
    <orient unit="DEG">
      <pitch> 0.00 </pitch>
      <roll>  0.00 </roll>
      <yaw>   0.00 </yaw>
    </orient>
    <thruster file="direct">
     <location unit="IN">
       <x> 969.00 </x>
       <y> -60.00 </y>
       <z> -12.00 </z>
     </location>
     <orient unit="DEG">
       <pitch> 0.00 </pitch>
       <roll>  0.00 </roll>
       <yaw>   0.00 </yaw>
     </orient>
    </thruster>
  </engine>

   <engine file="F101-GE-102">
    <feed>0</feed>
    <feed>1</feed>
    <feed>2</feed>
    <feed>3</feed>
    <feed>4</feed>
    <feed>5</feed>
    <feed>6</feed>
    <feed>7</feed>
    <feed>8</feed>
    <feed>9</feed>
    <feed>10</feed>
    <location unit="IN">
      <x> 969.00 </x>
      <y> -20.00 </y>
      <z> -12.00 </z>
    </location>
    <orient unit="DEG">
      <pitch> 0.00 </pitch>
      <roll>  0.00 </roll>
      <yaw>   0.00 </yaw>
    </orient>
    <thruster file="direct">
     <location unit="IN">
       <x> 969.00 </x>
       <y> -20.00 </y>
       <z> -12.00 </z>
     </location>
     <orient unit="DEG">
       <pitch> 0.00 </pitch>
       <roll>  0.00 </roll>
       <yaw>   0.00 </yaw>
     </orient>
    </thruster>
  </engine>

   <engine file="F101-GE-102">
    <feed>0</feed>
    <feed>1</feed>
    <feed>2</feed>
    <feed>3</feed>
    <feed>4</feed>
    <feed>5</feed>
    <feed>6</feed>
    <feed>7</feed>
    <feed>8</feed>
    <feed>9</feed>
    <feed>10</feed>
    <location unit="IN">
      <x> 969.00 </x>
      <y>  20.00 </y>
      <z> -12.00 </z>
    </location>
    <orient unit="DEG">
      <pitch> 0.00 </pitch>
      <roll>  0.00 </roll>
      <yaw>   0.00 </yaw>
    </orient>
    <thruster file="direct">
     <location unit="IN">
       <x> 969.00 </x>
       <y>  20.00 </y>
       <z> -12.00 </z>
     </location>
     <orient unit="DEG">
       <pitch> 0.00 </pitch>
       <roll>  0.00 </roll>
       <yaw>   0.00 </yaw>
     </orient>
    </thruster>
  </engine>

   <engine file="F101-GE-102">
    <feed>0</feed>
    <feed>1</feed>
    <feed>2</feed>
    <feed>3</feed>
    <feed>4</feed>
    <feed>5</feed>
    <feed>6</feed>
    <feed>7</feed>
    <feed>8</feed>
    <feed>9</feed>
    <feed>10</feed>
    <location unit="IN">
      <x> 969.00 </x>
      <y>  60.00 </y>
      <z> -12.00 </z>
    </location>
    <orient unit="DEG">
      <pitch> 0.00 </pitch>
      <roll>  0.00 </roll>
      <yaw>   0.00 </yaw>
    </orient>
    <thruster file="direct">
     <location unit="IN">
       <x> 969.00 </x>
       <y>  60.00 </y>
       <z> -12.00 </z>
     </location>
     <orient unit="DEG">
       <pitch> 0.00 </pitch>
       <roll>  0.00 </roll>
       <yaw>   0.00 </yaw>
     </orient>
    </thruster>
  </engine>
      <engine file="GTCP165-9A">
    <feed>0</feed>
    <feed>1</feed>
    <feed>2</feed>
    <feed>3</feed>
    <feed>4</feed>
    <feed>5</feed>
    <feed>6</feed>
    <feed>7</feed>
    <feed>8</feed>
    <feed>9</feed>
    <feed>10</feed>

    <thruster file="direct">
     <sense> 1 </sense>
    <location unit="IN">
      <x> 969.00 </x>
      <y>   0.00 </y>
      <z> -43.80 </z>
    </location>
     <orient unit="DEG">
       <pitch>     0.00 </pitch>
        <roll>     0.00 </roll>
         <yaw>     0.00 </yaw>
     </orient>
    </thruster>
  </engine>
     <engine file="GTCP165-9A">
    <feed>0</feed>
    <feed>1</feed>
    <feed>2</feed>
    <feed>3</feed>
    <feed>4</feed>
    <feed>5</feed>
    <feed>6</feed>
    <feed>7</feed>
    <feed>8</feed>
    <feed>9</feed>
    <feed>10</feed>

    <thruster file="direct">
     <sense> 1 </sense>
    <location unit="IN">
      <x> 969.00 </x>
      <y>   0.00 </y>
      <z> -43.80 </z>
    </location>
     <orient unit="DEG">
       <pitch>     0.00 </pitch>
        <roll>     0.00 </roll>
         <yaw>     0.00 </yaw>
     </orient>
    </thruster>
  </engine>

  <!-- wings tanks left and right-->

  <tank type="FUEL">
    <location unit="IN">
        <x>1031.5</x>
        <y>314.96</y>
        <z>-19.69</z>
    </location>
    <capacity unit="LBS">30000</capacity>
    <contents unit="LBS">30000</contents>
  </tank>
    <tank type="FUEL">
    <location unit="IN">
        <x>1031.5</x>
        <y>-314.96</y>
        <z>-19.69</z>
    </location>
    <capacity unit="LBS">30000</capacity>
    <contents unit="LBS">30000</contents>
  </tank>

    <!-- tanks 1/2/3/4 -->
    <tank type="FUEL">
        <location unit="IN">
            <x>472.44</x>
            <y>0.0</y>
            <z>0</z>
        </location>
        <capacity unit="LBS">30000</capacity>
        <contents unit="LBS">30000</contents>
    </tank>
     <tank type="FUEL">
        <location unit="IN">
            <x>728.35</x>
            <y>0.0</y>
            <z>0</z>
        </location>
        <capacity unit="LBS">40000</capacity>
        <contents unit="LBS">40000</contents>
    </tank>
     <tank type="FUEL">
        <location unit="IN">
            <x>1063</x>
            <y>0.0</y>
            <z>27.56</z>
        </location>
        <capacity unit="LBS">20000</capacity>
        <contents unit="LBS">20000</contents>
    </tank>
     <tank type="FUEL">
        <location unit="IN">
            <x>1456.69</x>
            <y>0.0</y>
            <z>0</z>
        </location>
        <capacity unit="LBS">50000</capacity>
        <contents unit="LBS">50000</contents>
    </tank>
     <!-- 2 collector fuel tanks with total 10000 lb each -->
     <tank type="FUEL">
        <location unit="IN">
            <x>905.51</x>
            <y>118.11</y>
            <z>-19.69</z>
        </location>
        <capacity unit="LBS">10000</capacity>
        <contents unit="LBS">10000</contents>
    </tank>
     <tank type="FUEL">
        <location unit="IN">
            <x>905.51</x>
            <y>-118.11</y>
            <z>-19.69</z>
        </location>
        <capacity unit="LBS">10000</capacity>
        <contents unit="LBS">10000</contents>
    </tank>

     <!-- weapons bay tanks with ~3k gal (20k lb) -->
     <tank type="FUEL">
        <location unit="IN">
            <x>602.36</x>
            <y>0.0</y>
            <z>0.0</z>
        </location>
        <capacity unit="LBS">20000</capacity>
        <contents unit="LBS">0</contents>
    </tank>
     <tank type="FUEL">
        <location unit="IN">
            <x>787.4</x>
            <y>0.0</y>
            <z>0.0</z>
        </location>
        <capacity unit="LBS">20000</capacity>
        <contents unit="LBS">0</contents>
    </tank>
     <tank type="FUEL">
        <location unit="IN">
            <x>1377.95</x>
            <y>0.0</y>
            <z>0.0</z>
        </location>
        <capacity unit="LBS">20000</capacity>
        <contents unit="LBS">0</contents>
    </tank>

 </propulsion>

 <flight_control name="FCS: B-1B">

 </flight_control>

 <aerodynamics>
             <function name="aero/coefficients/ClSweepFactor">
            <description>Wing sweep factor from norm of 22 (NASA-TM-D-6909)</description>
                <table>
                    <independentVar lookup="row">aero/alpha-deg</independentVar>
                    <independentVar lookup="column">fcs/sweep-pos-deg</independentVar>
                    <tableData>
                                   0        22        50        58
                         0  1.000000  1.000000  0.791274  0.653661
                        10  1.000000  1.000000  0.829267  0.700928
                        15  1.000000  1.000000  0.953910  0.860083
                        20  1.000000  1.000000  0.960603  0.910701
                        25  1.000000  1.000000  0.958058  0.969330
                        30  1.000000  1.000000  1.027476  0.955345
                        35  1.000000  1.000000  1.088021  0.994762
                        40  1.000000  1.000000  1.083636  1.049773
                        45  1.000000  1.000000  1.066517  1.066517
                        50  1.000000  1.000000  0.910848  0.936149
                        55  1.000000  1.000000  0.921275  0.914270
                    </tableData>
                </table>
        </function>

  <axis name="LIFT">

    <function name="aero/force/Lift_alpha">
      <description>Lift due to alpha</description>
      <product>
          <property>aero/qbar-psf</property>
          <property>metrics/Sw-sqft</property>
          <table>
            <independentVar lookup="row">aero/alpha-rad</independentVar>
            <tableData>
              -1.57  0.0000
              -1.22 -0.5004
              -1.05 -0.6742
              -0.88 -0.7785
              -0.63 -0.8957
               0.00  0.8999
               0.79  4.4889
               0.88  1.2215
               0.95  1.7956
               1.05  1.0578
               1.22  0.7852
               1.57  0.0000
            </tableData>
          </table>
<!--          <property>aero/coefficients/ClSweepFactor</property>-->
          <property>tune/lift/alpha</property>
      </product>
    </function>

<!--      TODO: Check Pitch rate lift  -->
<!--      TODO: Check Alpha rate lift  -->
    <function name="aero/force/Lift_pitch_rate">
        <description>Lift due to pitch rate</description>
        <product>
          <property>aero/qbar-psf</property>
          <property>metrics/Sw-sqft</property>
          <property>velocities/q-aero-rad_sec</property>
          <property>aero/ci2vel</property>
          <value> .7019303 </value>
        </product>
      </function>

      <function name="aero/force/Lift_alpha_rate">
        <description>Lift due to alpha rate</description>
        <product>
           <property>aero/qbar-psf</property>
           <property>metrics/Sw-sqft</property>
           <property>aero/alphadot-rad_sec</property>
           <property>aero/ci2vel</property>
           <value> .2420449 </value>
        </product>
      </function>

    <function name="aero/force/Lift_flap">
       <description>Delta Lift due to flaps</description>
       <product>
           <property>aero/qbar-psf</property>
           <property>metrics/Sw-sqft</property>
           <property>fcs/flap-pos-deg</property>
           <value> 0.0105 </value>
           <property>tune/lift/flap</property>
       </product>
    </function>

    <function name="aero/force/Lift_spoilers">
       <description>Delta Lift due to spoilers</description>
       <product>
           <property>aero/qbar-psf</property>
           <property>metrics/Sw-sqft</property>
           <property>fcs/spoilers-pos-norm</property>
           <value> 0.0000 </value>
       </product>
    </function>

    <function name="aero/force/Lift_speedbrake">
       <description>Delta Lift due to speedbrake</description>
       <product>
           <property>aero/qbar-psf</property>
           <property>metrics/Sw-sqft</property>
           <property>fcs/speedbrake-pos-norm</property>
           <value>0</value>
           <property>tune/lift/speedbrake</property>
       </product>
    </function>

    <function name="aero/force/Lift_elevator">
       <description>Lift due to Elevator Deflection</description>
       <product>
           <property>aero/qbar-psf</property>
           <property>metrics/Sw-sqft</property>
           <property>fcs/elevator-pos-rad</property>
           <value>0.7015</value>
           <property>tune/lift/elevator</property>
       </product>
    </function>

  </axis>

  <axis name="DRAG">
    <function name="aero/force/Drag_minimum">
       <description>Minimum drag</description>
       <product>
          <property>aero/qbar-psf</property>
          <property>metrics/Sw-sqft</property>
          <value> 0.0039 </value>
       </product>
    </function>

    <function name="aero/force/Drag_basic">
       <description>Drag at zero lift</description>
       <product>
          <property>aero/qbar-psf</property>
          <property>metrics/Sw-sqft</property>
          <table>
            <independentVar lookup="row">aero/alpha-rad</independentVar>
            <tableData>
             -1.57    1.4082
             -0.63    0.2564
              0.00    0.0000
              0.63    0.2564
              1.57    1.4082
            </tableData>
          </table>
<!--           <property>aero/coefficients/ClSweepFactor</property>-->
          <property>tune/drag/basic</property>
       </product>
    </function>

    <function name="aero/force/Drag_induced">
       <description>Induced drag</description>
         <product>
           <property>aero/qbar-psf</property>
           <property>metrics/Sw-sqft</property>
           <property>aero/cl-squared</property>
<!--             <property>aero/coefficients/ClSweepFactor</property>-->
           <value>0.0397</value>
           <property>tune/drag/induced</property>
         </product>
    </function>

    <function name="aero/force/Drag_mach">
       <description>Drag due to mach</description>
        <product>
          <property>aero/qbar-psf</property>
          <property>metrics/Sw-sqft</property>
          <table>
            <independentVar lookup="row">velocities/mach</independentVar>
            <tableData>
                0.00      0.000
                0.81      0.000
                1.10      0.023
                1.80      0.015
            </tableData>
          </table>
<!--            <property>aero/coefficients/ClSweepFactor</property>-->
          <property>tune/drag/mach</property>
        </product>
    </function>

    <function name="aero/force/Drag_flap">
       <description>Drag due to flaps</description>
         <product>
           <property>aero/qbar-psf</property>
           <property>metrics/Sw-sqft</property>
           <property>fcs/flap-pos-deg</property>
           <value> 0.0023 </value>
          <property>tune/drag/flap</property>
         </product>
    </function>

    <function name="aero/force/Drag_gear">
       <description>Drag due to gear</description>
         <product>
           <property>aero/qbar-psf</property>
           <property>metrics/Sw-sqft</property>
           <property>gear/gear-pos-norm</property>
           <value>0.02</value>
          <property>tune/drag/gear</property>
         </product>
    </function>

    <function name="aero/force/Drag_spoilers">
       <description>Drag due to spoilers</description>
         <product>
           <property>aero/qbar-psf</property>
           <property>metrics/Sw-sqft</property>
           <property>fcs/spoilers-pos-norm</property>
           <value> 0.0039 </value>
         </product>
    </function>

    <function name="aero/force/Drag_speedbrake">
       <description>Drag due to speedbrakes</description>
         <product>
           <property>aero/qbar-psf</property>
           <property>metrics/Sw-sqft</property>
           <property>fcs/speedbrake-pos-norm</property>
           <value>0.0800</value>
          <property>tune/drag/speedbrake</property>
         </product>
    </function>

    <function name="aero/force/Drag_beta">
       <description>Drag due to sideslip</description>
       <product>
          <property>aero/qbar-psf</property>
          <property>metrics/Sw-sqft</property>
          <table>
            <independentVar lookup="row">aero/beta-rad</independentVar>
            <tableData>
              -1.57    1.230
              -0.26    0.050
               0.00    0.000
               0.26    0.050
               1.57    1.230
            </tableData>
          <property>tune/drag/beta</property>
          </table>
       </product>
    </function>

    <function name="aero/force/Drag_elevator">
       <description>Drag due to Elevator Deflection</description>
       <product>
           <property>aero/qbar-psf</property>
           <property>metrics/Sw-sqft</property>
           <abs><property>fcs/elevator-pos-norm</property></abs>
           <value>0.04</value>
          <property>tune/drag/elevator</property>
       </product>
    </function>

  </axis>
  <!-- TODO: Spoilers -->
  <axis name="SIDE">

    <function name="aero/force/Side_beta">
       <description>Side force due to beta</description>
       <product>
           <property>aero/qbar-psf</property>
           <property>metrics/Sw-sqft</property>
           <property>aero/beta-rad</property>
           <value>-0.6061</value>
          <property>tune/side/beta</property>
       </product>
    </function>
<!--      TODO: Rudder? -->
<function name="aero/force/Side_roll_rate">
       <description>Side force due to roll rate</description>
       <product>
           <property>aero/qbar-psf</property>
           <property>metrics/Sw-sqft</property>
           <property>aero/bi2vel</property>
           <property>velocities/p-aero-rad_sec</property>
           <table>
             <independentVar lookup="row">aero/Re</independentVar>
             <tableData>
                  248313      0.8503
                  273144      0.0674
                  372469      0.0300
                  493877      0.0170
             </tableData>
           </table>
       </product>
    </function>

    <function name="aero/force/Side_yaw_rate">
       <description>Side force due to yaw rate</description>
       <product>
           <property>aero/qbar-psf</property>
           <property>metrics/Sw-sqft</property>
           <property>aero/bi2vel</property>
           <property>velocities/r-aero-rad_sec</property>
           <value> 0.5167 </value>
       </product>
    </function>

    <function name="aero/force/Side_rudder">
       <description>Side force due to rudder</description>
       <product>
           <property>aero/qbar-psf</property>
           <property>metrics/Sw-sqft</property>
           <property>fcs/rudder-pos-rad</property>
           <value> 0.1788 </value>
       </product>
    </function>

  </axis>

  <axis name="ROLL">

    <function name="aero/moment/Roll_beta">
       <description>Roll moment due to beta</description>
       <product>
           <property>aero/qbar-psf</property>
           <property>metrics/Sw-sqft</property>
           <property>metrics/bw-ft</property>
           <property>aero/beta-rad</property>
           <property>fcs/gear-no-wow</property>
           <table>
             <independentVar lookup="row">aero/alpha-rad</independentVar>
             <independentVar lookup="column">aero/Re</independentVar>
             <tableData>
                              248313      273144      372469      493877
                 -0.0349     -0.2505     -0.0260     -0.0211     -0.0312
                  0.3491     -3.0053     -0.2084     -0.1788     -0.2319
             </tableData>
           </table>
          <property>tune/roll/beta</property>
       </product>
    </function>

    <function name="aero/moment/Roll_damp">
       <description>Roll moment due to roll rate</description>
       <product>
           <property>aero/qbar-psf</property>
           <property>metrics/Sw-sqft</property>
           <property>metrics/bw-ft</property>
           <property>aero/bi2vel</property>
           <property>velocities/p-aero-rad_sec</property>
           <value>-0.3937</value>
           <property>tune/roll/damp</property>
       </product>
    </function>

    <function name="aero/moment/Roll_yaw">
       <description>Roll moment due to yaw rate</description>
       <product>
           <property>aero/qbar-psf</property>
           <property>metrics/Sw-sqft</property>
           <property>metrics/bw-ft</property>
           <property>aero/bi2vel</property>
           <property>velocities/r-aero-rad_sec</property>
           <table>
             <independentVar lookup="row">aero/alpha-rad</independentVar>
             <independentVar lookup="column">aero/Re</independentVar>
             <tableData>
                              248313      273144      372469      493877
                 -0.0349      0.1715      0.1715      0.1715      0.1715
                  0.3491     11.2185      0.8862      0.7180      0.7180
             </tableData>
           </table>
           <property>tune/roll/yaw</property>
       </product>
    </function>

    <function name="aero/moment/Roll_aileron">
       <description>Roll moment due to aileron</description>
       <product>
          <property>aero/qbar-psf</property>
          <property>metrics/Sw-sqft</property>
          <property>metrics/bw-ft</property>
          <property>fcs/aileron-pos-rad</property>
           <table>
            <independentVar lookup="row">velocities/mach</independentVar>
            <tableData>
              0.0    0.1200
              2.0    0.0300
            </tableData>
          </table>
           <property>tune/roll/aileron</property>
       </product>
    </function>

    <function name="aero/moment/Roll_rudder">
       <description>Roll moment due to rudder</description>
       <product>
           <property>aero/qbar-psf</property>
           <property>metrics/Sw-sqft</property>
           <property>metrics/bw-ft</property>
           <property>fcs/rudder-pos-rad</property>
           <value>0.01</value>
           <property>tune/roll/rudder</property>
       </product>
    </function>

    <function name="aero/moment/Roll_spoilers">
       <description>Roll moment due to spoilers</description>
       <product>
          <property>aero/qbar-psf</property>
          <property>metrics/Sw-sqft</property>
          <property>metrics/bw-ft</property>
          <property>fcs/spoilers-pos-norm</property>
          <property>fcs/aileron-pos-rad</property>
          <table>
            <independentVar lookup="row">aero/alpha-rad</independentVar>
            <tableData>
             -0.175   0.0000
              0.0     0.2400
              0.175   0.0000
            </tableData>
          </table>
       </product>
    </function>

  </axis>

  <axis name="PITCH">

    <function name="aero/moment/Pitch_alpha">
       <description>Pitch moment due to alpha</description>
       <product>
           <property>aero/qbar-psf</property>
           <property>metrics/Sw-sqft</property>
           <property>metrics/cbarw-ft</property>
           <property>aero/alpha-rad</property>
           <value>-.0958318</value>
           <property>tune/pitch/alpha</property>
       </product>
    </function>

    <function name="aero/moment/Pitch_elevator">
       <description>Pitch moment due to elevator</description>
       <product>
          <property>aero/qbar-psf</property>
          <property>metrics/Sw-sqft</property>
          <property>metrics/cbarw-ft</property>
          <property>fcs/elevator-pos-rad</property>
          <table>
            <independentVar lookup="row">velocities/mach</independentVar>
            <tableData>
              0.0    -.2253032
              2.0    -.0563258
            </tableData>
          </table>
           <property>tune/pitch/elevator</property>
       </product>
    </function>

    <function name="aero/moment/Pitch_damp">
       <description>Pitch moment due to pitch rate</description>
       <product>
           <property>aero/qbar-psf</property>
           <property>metrics/Sw-sqft</property>
           <property>metrics/cbarw-ft</property>
           <property>aero/ci2vel</property>
           <property>velocities/q-aero-rad_sec</property>
           <value>-.2254948125</value>
           <property>tune/pitch/damp</property>
       </product>
    </function>

    <function name="aero/moment/Pitch_alphadot">
       <description>Pitch moment due to alpha rate</description>
       <product>
           <property>aero/qbar-psf</property>
           <property>metrics/Sw-sqft</property>
           <property>metrics/cbarw-ft</property>
           <property>aero/ci2vel</property>
           <property>aero/alphadot-rad_sec</property>
           <value>-.0777568203</value>
           <property>tune/pitch/alphadot</property>
       </product>
    </function>

  </axis>

  <axis name="YAW">
          <function name="aero/moment/Yaw_alpha">
       <description>Yaw moment due to alpha</description>
       <product>
           <property>aero/qbar-psf</property>
           <property>metrics/Sw-sqft</property>
           <property>metrics/bw-ft</property>
           <property>aero/alpha-rad</property>
           <property>fcs/gear-no-wow</property>
           <table>
             <independentVar lookup="row">aero/beta-rad</independentVar>
             <independentVar lookup="column">aero/Re</independentVar>
             <tableData>
                              248313      273144
                 -0.3491     -1.0000      0.0000
                  0.3491      1.0000      0.0000
             </tableData>
           </table>
       </product>
    </function>


    <function name="aero/moment/Yaw_beta">
       <description>Yaw moment due to beta</description>
       <product>
           <property>aero/qbar-psf</property>
           <property>metrics/Sw-sqft</property>
           <property>metrics/bw-ft</property>
           <property>aero/beta-rad</property>
           <value>0.1241</value>
           <property>tune/yaw/beta</property>
       </product>
    </function>
    <function name="aero/moment/Yaw_roll_rate">
       <description>Yaw moment due to roll rate</description>
       <product>
           <property>aero/qbar-psf</property>
           <property>metrics/Sw-sqft</property>
           <property>metrics/bw-ft</property>
           <property>aero/bi2vel</property>
           <property>velocities/p-rad_sec</property>
           <table>
             <independentVar lookup="row">aero/Re</independentVar>
             <tableData>
                  248313     -0.3625
                  273144     -0.0287
                  372469     -0.0128
                  493877     -0.0073
             </tableData>
           </table>
       </product>
    </function>

    <function name="aero/moment/Yaw_damp">
       <description>Yaw moment due to yaw rate</description>
       <product>
           <property>aero/qbar-psf</property>
           <property>metrics/Sw-sqft</property>
           <property>metrics/bw-ft</property>
           <property>aero/bi2vel</property>
           <property>velocities/r-aero-rad_sec</property>
           <value>-0.1667</value>
           <property>tune/yaw/damp</property>
       </product>
    </function>

    <function name="aero/moment/Yaw_rudder">
       <description>Yaw moment due to rudder</description>
       <product>
           <property>aero/qbar-psf</property>
           <property>metrics/Sw-sqft</property>
           <property>metrics/bw-ft</property>
           <property>fcs/rudder-pos-rad</property>
           <value>-0.0762</value>
           <property>tune/yaw/rudder</property>
       </product>
    </function>

    <function name="aero/moment/Yaw_aileron">
       <description>Adverse yaw</description>
       <product>
           <property>aero/qbar-psf</property>
           <property>metrics/Sw-sqft</property>
           <property>metrics/bw-ft</property>
           <property>fcs/aileron-pos-rad</property>
           <value>0</value>
           <property>tune/yaw/aileron</property>
       </product>
    </function>

  </axis>

 </aerodynamics>

 <external_reactions>
 </external_reactions>

</fdm_config>
